*HEADING
cubit(./t01.inp): 10/24/2013: 10:34:20
version: 13.2
**
********************************** P A R T S **********************************
*PART, NAME=Part-Default
**
********************************** N O D E S **********************************
*NODE, NSET=ALLNODES
       1,   -2.900000e+04,   -2.900000e+04,    0.000000e+00
       2,   -2.900000e+04,   -2.819444e+04,    0.000000e+00
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**
********************************** E L E M E N T S ****************************
*ELEMENT, TYPE=C3D8R, ELSET=l01
       1,       1,       2,       3,       4,       5,       6,       7,       8
       2,       2,       9,      10,       3,       6,      11,      12,       7
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*ELEMENT, TYPE=C3D8R, ELSET=l02
    5185,   10659,   10660,   10661,   10662,   10663,   10664,   10665,   10666
    5186,   10660,   10667,   10668,   10661,   10664,   10669,   10670,   10665
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*ELEMENT, TYPE=S4R, ELSET=prx
   25345,   11332,   11334,   11333,   11331
   25346,   11334,   11696,   11695,   11333
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*ELEMENT, TYPE=S4R, ELSET=fsu
   28129,   10514,   10513,   10367,   10368
   28130,   10513,   10517,   10371,   10367
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**
********************************** P R O P E R T I E S ************************
*SOLID SECTION, ELSET=l01, MATERIAL=Default-Steel
*SOLID SECTION, ELSET=l02, MATERIAL=Default-Steel
*SHELL SECTION, ELSET=prx, SECTION INTEGRATION=SIMPSON, MATERIAL=Default-Steel
1.000000e+00
*SHELL SECTION, ELSET=fsu, SECTION INTEGRATION=SIMPSON, MATERIAL=Default-Steel
1.000000e+00
**
*END PART
**
**
**
********************************** E N D   P A R T S **********************************
**
**
********************************** A S S E M B L Y ************************************
**
*ASSEMBLY, NAME=ASSEMBLY1
**
*INSTANCE, NAME=Part-Default_1, PART=Part-Default
*END INSTANCE
**
*END ASSEMBLY
**
**
**
*MATERIAL, NAME = Default-Steel
*ELASTIC, TYPE=ISOTROPIC
2.068000e+05, 2.900000e-01
*DENSITY
7.000000e-06
*CONDUCTIVITY,TYPE=ISO
4.500000e-02
*SPECIFIC HEAT
5.000000e+02
**
**
************************************** H I S T O R Y *************************************
**
*PREPRINT
**
**************************************** S T E P 1 ***************************************
*STEP,INC=100,NAME=Default Set
**
*STATIC
1, 1, 1e-05, 1
**
**
**
**
*END STEP
